# OpenSim document version 30000
ScaleTool Stanford VA Upper Limb Model-scaled:
  mass: 50 [kg]
  height: -1
  age: -1
  GenericModelMaker:
    model_file: E:\Bureau\Colombe\Projet_These\Test_modeleMSK\Modeles_OpenSim\upperLimbModelSimplified_lig_Updt.osim
  ModelScaler:
    apply: true
    scaling_order: measurements
    marker_file: E:\Bureau\Colombe\Projet_These\Test_modeleMSK\AnatoAlexandra.trc
    time_range: 0.5 0.8
    preserve_mass_distribution: true
    MeasurementSet:
      Measurement thorax: apply=true
        MarkerPair: markers=(STER T10)
        MarkerPair: markers=(STERl XIPH)
        MarkerPair: markers=(STERr XIPH)
        MarkerPair: markers=(T10 T8)
        MarkerPair: markers=(STER XIPH)
        BodyScale thorax: axes=(X Y Z)
      Measurement clavicle: apply=true
        MarkerPair: markers=(CLAV_SC CLAV_AC)
        BodyScale clavicle: axes=(X Y Z)
      Measurement scapula: apply=true
        MarkerPair: markers=(SCAP_IA SCAP_SA)
        MarkerPair: markers=(ACRO_tip SCAP_SA)
        MarkerPair: markers=(ACRO_tip SCAP_IA)
        MarkerPair: markers=(SCAP_RS ACRO_tip)
        MarkerPair: markers=(SCAP_SA SCAP_AA)
        BodyScale scapula: axes=(X Y Z)
      Measurement humerus: apply=true
        MarkerPair: markers=(EPICl EPICm)
        MarkerPair: markers=(CLAV_AC EPICm)
        MarkerPair: markers=(ACRO_tip EPICl)
        MarkerPair: markers=(ACRO_tip EPICm)
        MarkerPair: markers=(ARMl ARMm)
        BodyScale humerus: axes=(X Y Z)
      Measurement ulna: apply=true
        MarkerPair: markers=(EPICm STYLu)
        MarkerPair: markers=(EPICm STYLr_up)
        MarkerPair: markers=(LARM_elb LARMl)
        MarkerPair: markers=(LARM_elb STYLu)
        BodyScale ulna: axes=(X Y Z)
      Measurement radius: apply=true
        MarkerPair: markers=(EPICl STYLr)
        MarkerPair: markers=(EPICl LARMl)
        MarkerPair: markers=(EPICl WRIST)
        BodyScale radius: axes=(X Y Z)
      Measurement hand_r: apply=true
        MarkerPair: markers=(MEDH LASTC)
        MarkerPair: markers=(LATH INDEX)
        MarkerPair: markers=(MEDH LATH)
        MarkerPair: markers=(INDEX LASTC)
        BodyScale radius: axes=(X Y Z)
  MarkerPlacer:
    apply: false
    time_range: -1 -1
    max_marker_movement: -1
    IKTaskSet:
      IKMarkerTask STER: apply=true weight=1
      IKMarkerTask STERl: apply=true weight=1
      IKMarkerTask STERr: apply=true weight=1
      IKMarkerTask XIPH: apply=true weight=1
      IKMarkerTask T10: apply=true weight=1
      IKMarkerTask T8: apply=true weight=1
      IKMarkerTask C6: apply=true weight=1
      IKMarkerTask CLAV_SC: apply=true weight=1
      IKMarkerTask CLAV_AC: apply=true weight=1
      IKMarkerTask CLAVm: apply=true weight=1
      IKMarkerTask CLAVl: apply=true weight=1
      IKMarkerTask CLAV_ant: apply=true weight=1
      IKMarkerTask CLAV_post: apply=true weight=1
      IKMarkerTask SCAP_IA: apply=true weight=1
      IKMarkerTask SCAP_RS: apply=true weight=1
      IKMarkerTask SCAP_SA: apply=true weight=1
      IKMarkerTask SCAP_CP: apply=true weight=1
      IKMarkerTask SCAPl: apply=true weight=1
      IKMarkerTask SCAPm: apply=true weight=1
      IKMarkerTask SCAP_AA: apply=true weight=1
      IKMarkerTask ACRO_tip: apply=true weight=1
      IKMarkerTask DELT: apply=true weight=1
      IKMarkerTask ARMm: apply=true weight=1
      IKMarkerTask ARMl: apply=true weight=1
      IKMarkerTask ARMp_up: apply=true weight=1
      IKMarkerTask ARMp_do: apply=true weight=1
      IKMarkerTask EPICl: apply=true weight=1
      IKMarkerTask EPICm: apply=true weight=1
      IKMarkerTask LARMl: apply=true weight=1
      IKMarkerTask LARMm: apply=true weight=1
      IKMarkerTask LARM_elb: apply=true weight=1
      IKMarkerTask LARM_ant: apply=true weight=1
      IKMarkerTask STYLr: apply=true weight=1
      IKMarkerTask STYLu: apply=true weight=1
      IKMarkerTask STYLr_up: apply=true weight=1
      IKMarkerTask WRIST: apply=true weight=1
      IKMarkerTask LATH: apply=true weight=1
      IKMarkerTask LASTC: apply=true weight=1
      IKMarkerTask MEDH: apply=true weight=1
      IKMarkerTask INDEX: apply=true weight=1
