# OpenSim document version 30000
Model Stanford VA Upper Limb Model-scaled:
  credits: Model authors names..
  publications: List of publications related to model...
  length_units: meters
  force_units: N
  gravity: 0 -9.80665 0
  BodySet:
    Body ground: mass=0 mass_center=(0 0 0) inertia_xx=0 inertia_yy=0 inertia_zz=0
    Body thorax: mass=67.51399 mass_center=(0 -0.440455 0) inertia_xx=5.156339 inertia_yy=0.9894959 inertia_zz=5.642032
        meshes=thorax.vtp
      CustomJoint ground_thorax: parent_body=ground location_in_parent=(0 0 0) location=(0 0 0)
        Coordinate Th_rotX: motion_type=rotational default_value=0 range=(-0.4 0.4) clamped=true
        Coordinate Th_rotY: motion_type=rotational default_value=0 range=(-1.57 1.57) clamped=true
        Coordinate Th_rotZ: motion_type=rotational default_value=0 range=(-0.41 0.4000001) clamped=true
        Coordinate Th_transX: motion_type=translational default_value=0 range=(-25 25) clamped=true
        Coordinate Th_transY: motion_type=translational default_value=0 range=(-25 25) clamped=true
        Coordinate Th_transZ: motion_type=translational default_value=0 range=(-25 25) clamped=true
        SpatialTransform:
          TransformAxis rotation1: coordinates=Th_rotX axis=(1 0 0) LinearFunction(coefficients=1 0)
          TransformAxis rotation2: coordinates=Th_rotY axis=(0 1 0) LinearFunction(coefficients=1 0)
          TransformAxis rotation3: coordinates=Th_rotZ axis=(0 0 1) LinearFunction(coefficients=1 0)
          TransformAxis translation1: coordinates=Th_transX axis=(1 0 0) LinearFunction(coefficients=1 0)
          TransformAxis translation2: coordinates=Th_transY axis=(0 1 0) LinearFunction(coefficients=1 0)
          TransformAxis translation3: coordinates=Th_transZ axis=(0 0 1) LinearFunction(coefficients=1 0)
    Body spine: mass=0.01110874 mass_center=(0 0 0) inertia_xx=0.0001112044 inertia_yy=0.0001112044
        inertia_zz=0.0001112044 meshes=ground_spine.vtp
      WeldJoint spine_thorax: parent_body=thorax location_in_parent=(0 0 0) location=(0 0 0)
    Body clavicle: mass=0.002248431 mass_center=(0 0 0) inertia_xx=0.002521779 inertia_yy=0.002521779
        inertia_zz=0.002521779 meshes=clavicle.vtp
      CustomJoint sternoclavicular: parent_body=thorax location_in_parent=(0.006440533 0.007056584 0.02593015)
          location=(0 0 0)
        Coordinate Clav_rotZ_right: motion_type=rotational default_value=0 range=(-0.5 1.6) clamped=true
        Coordinate Clav_rotY_right: motion_type=rotational default_value=0 range=(-1.020926 1.2) clamped=true
        Coordinate Clav_rotX_right: motion_type=rotational default_value=0 range=(-0.6 1.5) clamped=true
        SpatialTransform: axes_held_at_zero=(translation1 translation2 translation3)
          TransformAxis rotation1: coordinates=Clav_rotZ_right axis=(-0.0153 -0.9892987 0.1451)
              LinearFunction(coefficients=1 0)
          TransformAxis rotation2: coordinates=Clav_rotY_right axis=(-0.9944725 0 -0.104997)
              LinearFunction(coefficients=1 0)
          TransformAxis rotation3: coordinates=Clav_rotX_right axis=(-0.103812 0.145416 0.9839092)
              LinearFunction(coefficients=1 0)
    Body scapula: mass=0.02117314 mass_center=(0 0 0) inertia_xx=0.0002720202 inertia_yy=0.0002720202
        inertia_zz=0.0002720202 meshes=scapula.vtp
      CustomJoint acromioclavicular: parent_body=clavicle location_in_parent=(-0.01517724 0.02125619 0.1435461)
          location=(0 0 0)
        Coordinate Scap_rotZ_right: motion_type=rotational default_value=0 range=(-1 1.5) clamped=true
        Coordinate Scap_rotY_right: motion_type=rotational default_value=0 range=(-0.5 1.5) clamped=true
        Coordinate Scap_rotX_right: motion_type=rotational default_value=0 range=(-0.5 1.5) clamped=true
        SpatialTransform: axes_held_at_zero=(translation1 translation2 translation3)
          TransformAxis rotation1: coordinates=Scap_rotZ_right axis=(-0.1570949 -0.9472686 0.2792909)
              LinearFunction(coefficients=1 0)
          TransformAxis rotation2: coordinates=Scap_rotY_right axis=(-0.754084 0.297594 0.585487)
              LinearFunction(coefficients=1 0)
          TransformAxis rotation3: coordinates=Scap_rotX_right axis=(0.6376999 0.1186 0.7610998)
              LinearFunction(coefficients=1 0)
    Body humerus: mass=3.704106 mass_center=(0 -0.144423 0) inertia_xx=0.04021575 inertia_yy=0.006150442
        inertia_zz=0.04021575 meshes=humerus.vtp
      CustomJoint preshoulder1: parent_body=scapula location_in_parent=(-0.01622357 -0.04653349 -0.001997224)
          orientation_in_parent=(-0.005029829 0.5754064 0.02660599) location=(0 0 0)
        Coordinate Hum_rotZ_right: motion_type=rotational default_value=0 range=(-2.5 0.5) clamped=true
        Coordinate Hum_rotY_right: motion_type=rotational default_value=0 range=(-3 3) clamped=true
        Coordinate Hum_rotZZ_right: motion_type=rotational default_value=0 range=(-2.5 0.5) clamped=true
        SpatialTransform: axes_held_at_zero=(translation1 translation2 translation3)
          TransformAxis rotation1: coordinates=Hum_rotZ_right axis=(1 0 0) LinearFunction(coefficients=1 0)
          TransformAxis rotation2: coordinates=Hum_rotY_right axis=(0 0 1) LinearFunction(coefficients=1 0)
          TransformAxis rotation3: coordinates=Hum_rotZZ_right axis=(0 1 0) LinearFunction(coefficients=1 0)
      WrapEllipsoid humerus: xyz_body_rotation=(-0.15708 -0.0172788 -0.00296706)
          translation=(0.00936012 -0.304737 0.0152368) quadrant=-z dimensions=(0.0141485 0.0217669 0.0653007)
      WrapCylinder humerus_post: xyz_body_rotation=(0.0610865 0.0338594 0.505098)
          translation=(0.00283019 -0.311049 -0.0115361) quadrant=-x radius=0.01414847 length=0.108834
      WrapSphere tete_hum: translation=(-0.0118245 0.000435807 0.00250307) quadrant=all radius=0.03426839
      WrapSphere tete_hum_small: translation=(-0.00021739 0.000435807 0.00250307) quadrant=all radius=0.02688206
    Body ulna: mass=1.433798 mass_center=(0 -0.114073 0) inertia_xx=0.008360394 inertia_yy=0.0009438105
        inertia_zz=0.008495224 meshes=ulna.vtp
      CustomJoint elbow: parent_body=humerus location_in_parent=(0.006638634 -0.316055 -0.01338699)
          orientation_in_parent=(0.003490659 0.003490659 0) location=(0 0 0)
        Coordinate Elb_flex_right: motion_type=rotational default_value=0 range=(0 3.14) clamped=true
        SpatialTransform: axes_held_at_zero=(rotation1 rotation2 translation1 translation2 translation3)
          TransformAxis rotation3: coordinates=Elb_flex_right axis=(0.04940001 0.03660001 0.9981082)
              LinearFunction(coefficients=1 0)
    Body radius: mass=0.01605391 mass_center=(0 0 0) inertia_xx=0.0002027684 inertia_yy=0.0002027684
        inertia_zz=0.0002027684 meshes=radius.vtp
      CustomJoint radioulnar: parent_body=ulna location_in_parent=(0.0004026755 -0.01157172 0.02011749)
          location=(0 0 0)
        Coordinate Elb_ProSup_right: motion_type=rotational default_value=0 range=(-2.5 2.5) clamped=true
        SpatialTransform: axes_held_at_zero=(rotation2 rotation3 translation1 translation2 translation3)
          TransformAxis rotation1: coordinates=Elb_ProSup_right axis=(0.01716099 -0.9926656 0.119668)
              LinearFunction(coefficients=1 0)
    Body hand_r: mass=0.2975206 mass_center=(0 -0.068095 0) inertia_xx=0.0005800839 inertia_yy=0.0003557241
        inertia_zz=0.0008714265
        meshes=(pisiform.vtp lunate.vtp scaphoid.vtp triquetrum.vtp hamate.vtp capitate.vtp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)
      CustomJoint radius_hand_r: parent_body=radius location_in_parent=(0.02053835 -0.2719535 0.03522032)
          location=(0 0 0)
        Coordinate wrist_dev_r: motion_type=rotational default_value=0 range=(-3.14 3.14) clamped=true
        Coordinate wrist_flex_r: motion_type=rotational default_value=0 range=(-3.14 3.14) clamped=true
        SpatialTransform: axes_held_at_zero=(rotation3 translation1 translation2 translation3)
          TransformAxis rotation1: coordinates=wrist_dev_r axis=(-0.819064 -0.135611 -0.557444)
            SimmSpline: x=(-0.174533 0 0.436332) y=(-0.174533 0 0.436332)
          TransformAxis rotation2: coordinates=wrist_flex_r axis=(0.9564267 -0.2522069 0.147104)
            SimmSpline: x=(-1.5708 1.5708) y=(-0.785398 0.785398)
  ForceSet:
    Thelen2003Muscle LIG1: min_control=0 max_control=0 max_isometric_force=0.00058231 optimal_fiber_length=0.5204899
        tendon_slack_length=0.0413 pennation_angle_at_optimal=0 [radians] max_contraction_velocity=10
        default_fiber_length=0.0001 FmaxTendonStrain=3.6712e-6
      PathPoint P1: humerus (-0.0202823 -0.0182795 0.00747091)
      PathPoint P2: scapula (-0.0463022 -0.05055 -0.0108215)
      PathWrap: wrap_object=tete_hum_small method=hybrid
    Thelen2003Muscle LIG2: min_control=0 max_control=0 max_isometric_force=0.00041057 optimal_fiber_length=0.5204899
        tendon_slack_length=0.0413 pennation_angle_at_optimal=0 max_contraction_velocity=10 default_fiber_length=0.0001
        FmaxTendonStrain=2.4936e-6
      PathPoint P1: humerus (-0.00937307 -0.0236475 -0.00640718)
      PathPoint P2: scapula (-0.0409675 -0.06369 -0.017715)
      PathWrap: wrap_object=tete_hum_small method=hybrid
    Thelen2003Muscle LIG3: min_control=0 max_control=0 max_isometric_force=0.00027624 optimal_fiber_length=0.5204899
        tendon_slack_length=0.0413 pennation_angle_at_optimal=0 max_contraction_velocity=10 default_fiber_length=0.0001
        FmaxTendonStrain=1.0059e-6
      PathPoint P1: humerus (-0.0002034 -0.0162655 -0.0238538)
      PathPoint P2: scapula (-0.0288977 -0.0583932 -0.0242715)
      PathWrap: wrap_object=tete_hum_small method=hybrid
    Thelen2003Muscle LIG4: min_control=0 max_control=0 max_isometric_force=0.00034647 optimal_fiber_length=0.5238513
        tendon_slack_length=0.0407 pennation_angle_at_optimal=0 max_contraction_velocity=10 default_fiber_length=0.0001
        FmaxTendonStrain=1.948e-6
      PathPoint P1: humerus (0.00932795 -0.00252449 -0.0244259)
      PathPoint P2: scapula (-0.0220906 -0.0448912 -0.029195)
      PathWrap: wrap_object=tete_hum_small method=hybrid
    Thelen2003Muscle LIG5: min_control=0 max_control=0 max_isometric_force=0.00021766 optimal_fiber_length=0.523822
        tendon_slack_length=0.0407 pennation_angle_at_optimal=0 max_contraction_velocity=10 default_fiber_length=0.0001
        FmaxTendonStrain=1.1997e-6
      PathPoint P1: humerus (0.0158008 0.0153501 -0.0184173)
      PathPoint P2: scapula (-0.0204547 -0.0329274 -0.0348875)
      PathWrap: wrap_object=tete_hum_small method=hybrid
    Thelen2003Muscle LIG6: min_control=0 max_control=0 max_isometric_force=0.00031382 optimal_fiber_length=0.5234174
        tendon_slack_length=0.0407 pennation_angle_at_optimal=0 max_contraction_velocity=10 default_fiber_length=0.0001
        FmaxTendonStrain=7.3516e-7
      PathPoint P1: humerus (0.0175558 0.021312 -0.00805087)
      PathPoint P2: scapula (-0.0137968 -0.0262693 -0.0347777)
      PathWrap: wrap_object=tete_hum_small method=hybrid
    Thelen2003Muscle LIG7: min_control=0 max_control=0 max_isometric_force=0.00031382 optimal_fiber_length=0.525167
        tendon_slack_length=0.0407 pennation_angle_at_optimal=0 max_contraction_velocity=10 default_fiber_length=0.0001
        FmaxTendonStrain=7.3516e-7
      PathPoint P1: humerus (0.0095886 0.023359 0.0139925)
      PathPoint P2: scapula (-0.0210602 -0.019798 -0.0311602)
      PathWrap: wrap_object=tete_hum_small method=hybrid
    Thelen2003Muscle DELT1: max_isometric_force=1142.6 optimal_fiber_length=0.09462521 tendon_slack_length=0.09016541
        pennation_angle_at_optimal=0.3839724 max_contraction_velocity=10
      PathPoint P1: humerus (0.00975155 -0.129328 0.00636682)
      PathPoint P2: humerus (0.0294097 -0.0168886 0.020477)
      PathPoint P4: clavicle (-0.0192026 0.0196577 0.11166)
      PathWrap: wrap_object=tete_hum method=hybrid
    Thelen2003Muscle DELT2: max_isometric_force=1142.6 optimal_fiber_length=0.06678596 tendon_slack_length=0.1105981
        pennation_angle_at_optimal=0.2617994 max_contraction_velocity=10
      PathPoint P1: humerus (0.00501727 -0.148135 0.00609472)
      PathPoint P2: humerus (0.00326445 -0.0391096 0.0325486)
      PathPoint P3: scapula (-0.0122174 -0.000385335 0.00702671)
      PathWrap: wrap_object=tete_hum method=hybrid
    Thelen2003Muscle DELT3: max_isometric_force=259.88 optimal_fiber_length=0.1304463 tendon_slack_length=0.0360124
        pennation_angle_at_optimal=0.3141593 max_contraction_velocity=10
      PathPoint P1: scapula (-0.0752687 -0.00105942 -0.0527559)
      PathPoint P2: scapula (-0.0835543 -0.0385691 -0.0272127)
      PathPoint P3: humerus (-0.00422917 -0.0789181 0.00161486)
      PathWrap: wrap_object=tete_hum method=hybrid
    Thelen2003Muscle SUPSP: max_isometric_force=487.82 optimal_fiber_length=0.08408698 tendon_slack_length=0.03668303
        pennation_angle_at_optimal=0.122173 max_contraction_velocity=10
      PathPoint P1: humerus (-0.000749943 0.0165142 0.0278686)
      PathPoint P2: scapula (-0.0663005 -0.00508869 -0.0871312)
      PathWrap: wrap_object=tete_hum_small method=hybrid
    Thelen2003Muscle INFSP: max_isometric_force=1210.84 optimal_fiber_length=0.1119132 tendon_slack_length=0.02871428
        pennation_angle_at_optimal=0.3228859 max_contraction_velocity=10
      PathPoint P1: humerus (-0.0116528 -0.00158952 0.027548)
      PathPoint P2: scapula (-0.0705483 -0.0535173 -0.0304407)
      PathPoint P3: scapula (-0.0884006 -0.0650538 -0.055069)
      PathWrap: wrap_object=tete_hum_small method=hybrid
    Thelen2003Muscle SUBSC: max_isometric_force=1377.81 optimal_fiber_length=0.07878797 tendon_slack_length=0.02978239
        pennation_angle_at_optimal=0.3490659 max_contraction_velocity=10
      PathPoint P1: humerus (0.0183277 0.00736809 -0.0157919)
      PathPoint P2: scapula (-0.0179748 -0.0512043 -0.0257043)
      PathPoint P3: scapula (-0.0830361 -0.0462447 -0.0751362)
      PathWrap: wrap_object=tete_hum method=hybrid
    Thelen2003Muscle TMIN: max_isometric_force=354.25 optimal_fiber_length=0.1198285 tendon_slack_length=0.06591878
        pennation_angle_at_optimal=0.418879 max_contraction_velocity=10
      PathPoint P1: humerus (0.000108834 -0.0144967 0.0249883)
      PathPoint P5: scapula (-0.107014 -0.0888039 -0.0516811)
      PathWrap: wrap_object=tete_hum_small method=hybrid
    Thelen2003Muscle TMAJ: max_isometric_force=425.39 optimal_fiber_length=0.1883779 tendon_slack_length=0.01808798
        pennation_angle_at_optimal=0.2792527 max_contraction_velocity=10
      PathPoint P1: humerus (0.0108617 -0.0589773 -0.0061818)
      ConditionalPathPoint P2: humerus (0.000163252 -0.0622207 -0.0142682) range=(-1.91986 0)
          coordinate=Hum_rotZZ_right
      PathPoint P3: scapula (-0.0541779 -0.0953241 -0.000890782)
      PathPoint P3: scapula (-0.115714 -0.117187 -0.0636258)
      PathPoint P4: scapula (-0.12313 -0.125402 -0.0860238)
      PathWrap: wrap_object=tete_hum_small method=hybrid
    Thelen2003Muscle PECM1: max_isometric_force=364.41 optimal_fiber_length=0.1363214 tendon_slack_length=0.002647017
        pennation_angle_at_optimal=0.296706 max_contraction_velocity=10
      PathPoint P1: humerus (0.0127226 -0.0456125 0.00848908)
      PathPoint P4: clavicle (0.0033997 0.00601284 0.0695285)
      PathWrap: wrap_object=tete_hum method=hybrid
    Thelen2003Muscle PECM2: max_isometric_force=515.41 optimal_fiber_length=0.1323058 tendon_slack_length=0.08501962
        pennation_angle_at_optimal=0.4363323 max_contraction_velocity=10
      PathPoint P1: humerus (0.0138654 -0.046679 0.0085435)
      PathPoint P3: thorax (0.0205486 -0.0424108 0.129218)
      PathPoint P4: thorax (0.0363053 -0.0460658 0.11399)
      PathPoint P5: thorax (0.0325233 -0.0528312 0.026674)
    Thelen2003Muscle PECM3: max_isometric_force=390.55 optimal_fiber_length=0.09748579 tendon_slack_length=0.1222124
        pennation_angle_at_optimal=0.4363323 max_contraction_velocity=10
      PathPoint P1: humerus (0.0138111 -0.047615 0.00816258)
      PathPoint P3: thorax (0.0299733 -0.0808133 0.12418)
      PathPoint P4: thorax (0.0513623 -0.1009 0.099255)
      PathPoint P5: thorax (0.0672312 -0.136882 0.0444802)
    Thelen2003Muscle LAT1: max_isometric_force=389.1 optimal_fiber_length=0.2456442 tendon_slack_length=0.1160524
        pennation_angle_at_optimal=0.4363323 max_contraction_velocity=10
      PathPoint P1: humerus (0.0114277 -0.037167 -0.00710689)
      PathPoint P2: humerus (-0.00690019 -0.0286179 -0.00995472)
      PathPoint P2: scapula (-0.071955 -0.0776953 -0.0198109)
      PathPoint P3: scapula (-0.109807 -0.0943341 -0.0568303)
      PathPoint P4: thorax (-0.150553 -0.122896 0.0652761)
      PathPoint P5: thorax (-0.112498 -0.137704 0.0103595)
    Thelen2003Muscle LAT2: max_isometric_force=389.1 optimal_fiber_length=0.2332199 tendon_slack_length=0.1771227
        pennation_angle_at_optimal=0.3316126 max_contraction_velocity=10
      PathPoint P1: humerus (0.0105352 -0.0443065 -0.00664978)
      PathPoint P2: humerus (-0.010817 -0.0501153 -0.00816953)
      PathPoint P3: thorax (-0.122355 -0.0925476 0.174849)
      PathPoint P4: thorax (-0.144614 -0.148528 0.10115)
      PathPoint P5: thorax (-0.125795 -0.198306 0.0360016)
      PathPoint P6: thorax (-0.0844032 -0.221027 0.00957257)
    Thelen2003Muscle LAT3: max_isometric_force=281.66 optimal_fiber_length=0.2844688 tendon_slack_length=0.1431013
        pennation_angle_at_optimal=0.3665191 max_contraction_velocity=10
      PathPoint P1: humerus (0.0131472 -0.0426849 -0.00452752)
      PathPoint P2: humerus (-0.00579625 -0.044483 -0.00893429)
      PathPoint P2: thorax (-0.112692 -0.112625 0.167407)
      PathPoint P3: thorax (-0.114675 -0.134411 0.157708)
      PathPoint P4: thorax (-0.11751 -0.182149 0.127499)
      PathPoint P5: thorax (-0.129256 -0.231563 0.0697287)
      PathPoint P6: thorax (-0.0864854 -0.273044 0.0108791)
    Thelen2003Muscle CORB: max_isometric_force=242.46 optimal_fiber_length=0.09546618 tendon_slack_length=0.09935858
        pennation_angle_at_optimal=0 max_contraction_velocity=10
      PathPoint P1: scapula (0.0141668 -0.0467729 -0.0300563)
      ConditionalPathPoint P3: humerus (0.00496285 -0.130492 -0.0158571) range=(-6.28319 -0.436332)
          coordinate=Hum_rotZZ_right
      PathPoint P4: humerus (0.00808639 -0.163774 -0.00851084)
      PathWrap: wrap_object=tete_hum method=hybrid
    Thelen2003Muscle TRIlong: max_isometric_force=798.52 optimal_fiber_length=0.159854 tendon_slack_length=0.1484816
        pennation_angle_at_optimal=0.2094395 max_contraction_velocity=10
      PathPoint P1: scapula (-0.0443929 -0.0563498 -0.0134528)
      ConditionalPathPoint P2: humerus (-0.0205478 -0.265947 -0.00912031) range=(1.79769 6.28319)
          coordinate=Clav_rotY_right
      PathPoint P3: humerus (-0.0189698 -0.291207 -0.0131472)
      PathPoint P4: ulna (-0.0220302 0.0105221 -0.000784636)
      PathWrap: wrap_object=humerus_post method=hybrid
    Thelen2003Muscle TRIlat: max_isometric_force=624.3 optimal_fiber_length=0.08634403 tendon_slack_length=0.1017617
        pennation_angle_at_optimal=0.1570796 max_contraction_velocity=10
      PathPoint P1: humerus (-0.00651919 -0.137632 0.00465811)
      PathPoint P2: humerus (-0.0265773 -0.271281 -0.0114385)
      PathPoint P3: ulna (-0.0220302 0.0105221 -0.000784636)
      PathWrap: wrap_object=humerus_post method=hybrid
    Thelen2003Muscle TRImed: max_isometric_force=624.3 optimal_fiber_length=0.08619333 tendon_slack_length=0.09415781
        pennation_angle_at_optimal=0.1570796 max_contraction_velocity=10
      PathPoint P1: humerus (-0.00912031 -0.149048 -0.00986038)
      PathPoint P2: humerus (-0.0346529 -0.246369 -0.0132452)
      PathPoint P3: humerus (-0.0189698 -0.291207 -0.0131472)
      PathPoint P4: ulna (-0.0220302 0.0105221 -0.000784636)
      PathWrap: wrap_object=humerus_post method=hybrid
    Thelen2003Muscle BIClong: max_isometric_force=624.3 optimal_fiber_length=0.1157 tendon_slack_length=0.2723
        pennation_angle_at_optimal=0 max_contraction_velocity=10
      PathPoint P1: scapula (-0.0353942 -0.0266676 -0.0147901)
      PathPoint P2: humerus (0.0116344 0.029984 -0.00269909)
      PathPoint P3: humerus (0.0223001 0.0185563 0.000391803)
      PathPoint P4: humerus (0.0298861 2.17669e-5 0.000163252)
      PathPoint P5: humerus (0.0135063 -0.0414441 -0.00487578)
      PathPoint P6: humerus (0.0125704 -0.0845642 -0.00259025)
      PathPoint P7: humerus (0.0185344 -0.131961 0.000261203)
      PathPoint P8: humerus (0.0248144 -0.190894 -0.00685657)
      PathPoint P9: humerus (0.023585 -0.294299 -0.0112797)
      PathPoint P10: radius (-0.00224779 -0.0421462 -0.00224779)
      PathWrap: wrap_object=humerus method=hybrid
    Thelen2003Muscle BICshort: max_isometric_force=435.56 optimal_fiber_length=0.133941 tendon_slack_length=0.1949799
        pennation_angle_at_optimal=0 max_contraction_velocity=10
      PathPoint P1: scapula (0.0143708 -0.0445517 -0.0297503)
      PathPoint P2: humerus (0.0121567 -0.0824529 -0.0119826)
      PathPoint P3: humerus (0.0185344 -0.131961 -0.0117432)
      PathPoint P4: humerus (0.0248144 -0.190894 -0.00685657)
      PathPoint P5: humerus (0.0184577 -0.292248 -0.00615258)
      PathPoint P6: radius (-0.00224779 -0.0421462 -0.00224779)
      PathWrap: wrap_object=humerus method=hybrid
    Thelen2003Muscle BRA: max_isometric_force=987.26 optimal_fiber_length=0.0858 tendon_slack_length=0.0535
        pennation_angle_at_optimal=0
      PathPoint P1: humerus (0.00445182 -0.183077 0.00331912)
      PathPoint P2: humerus (0.0163984 -0.285511 -0.0109795)
      PathPoint P3: ulna (0.0150708 -0.00973682 -0.00172655)
      PathPoint P4: ulna (-0.00320002 -0.0239 0.000900021)
    Thelen2003Muscle BRD: max_isometric_force=261.33 optimal_fiber_length=0.1726 tendon_slack_length=0.133
        pennation_angle_at_optimal=0
      PathPoint P1: humerus (-0.0098 -0.19963 0.00223)
      PathPoint P2: radius (0.03577 -0.12742 0.02315)
      PathPoint P3: radius (0.0419 -0.221 0.0224)
    Thelen2003Muscle trap_scap_1: max_isometric_force=118 optimal_fiber_length=0.1726831
        tendon_slack_length=0.002800267 pennation_angle_at_optimal=0 max_contraction_velocity=10
      PathPoint P1: spine (-0.0752378 0.0352508 0.00480476)
      PathPoint P2: thorax (-0.109111 0.0277899 0.0333431)
      PathPoint P4: scapula (-0.0382018 0.000607558 -0.0109545)
    Thelen2003Muscle trap_scap_2: max_isometric_force=168 optimal_fiber_length=0.1259338 tendon_slack_length=0.02428724
        pennation_angle_at_optimal=0 max_contraction_velocity=10
      PathPoint P1: spine (-0.0871441 0.0105257 0.00589258)
      PathPoint P2: thorax (-0.12923 0.00956586 0.0697564)
      PathPoint P3: scapula (-0.0613041 0.000945117 -0.020734)
    Thelen2003Muscle trap_scap_3: max_isometric_force=199 optimal_fiber_length=0.09786398 tendon_slack_length=0.0493893
        pennation_angle_at_optimal=0 max_contraction_velocity=10
      PathPoint P1: spine (-0.0959959 -0.0318952 0.00828639)
      PathPoint P2: thorax (-0.163679 -0.0291428 0.0595105)
      PathPoint P3: scapula (-0.0687029 0.000792367 -0.0402665)
    Thelen2003Muscle trap_scap_4: max_isometric_force=138 optimal_fiber_length=0.08895091
        tendon_slack_length=0.04952099 pennation_angle_at_optimal=0 max_contraction_velocity=10
      PathPoint P1: spine (-0.108089 -0.0569093 0.00719417)
      PathPoint P2: thorax (-0.162455 -0.0372271 0.0567413)
      PathPoint P3: scapula (-0.0780963 -0.00192381 -0.0546924)
    Thelen2003Muscle trap_scap_5: max_isometric_force=122 optimal_fiber_length=0.08747581
        tendon_slack_length=0.03313478 pennation_angle_at_optimal=0 max_contraction_velocity=10
      PathPoint P1: spine (-0.111391 -0.0781199 0.00776653)
      PathPoint P2: thorax (-0.160984 -0.0448676 0.065841)
      PathPoint P3: scapula (-0.0749712 -0.00412423 -0.0639479)
    Thelen2003Muscle trap_scap_6: max_isometric_force=101 optimal_fiber_length=0.1217007 tendon_slack_length=0.03139987
        pennation_angle_at_optimal=0 max_contraction_velocity=10
      PathPoint P1: spine (-0.112815 -0.105164 0.0073428)
      PathPoint P2: thorax (-0.171008 -0.0736855 0.0531967)
      PathPoint P3: scapula (-0.091242 -0.00365377 -0.0814765)
      PathPoint P4: scapula (-0.0788099 -0.00583629 -0.058168)
    Thelen2003Muscle trap_scap_7: max_isometric_force=97 optimal_fiber_length=0.1484171 tendon_slack_length=0.03453016
        pennation_angle_at_optimal=0 max_contraction_velocity=10
      PathPoint P1: spine (-0.111829 -0.131002 0.00730491)
      PathPoint P2: thorax (-0.164549 -0.0743626 0.0609591)
      PathPoint P3: scapula (-0.0923379 -0.00955976 -0.077878)
      PathPoint P4: scapula (-0.081715 -0.00383775 -0.0645215)
    Thelen2003Muscle trap_scap_8: max_isometric_force=138 optimal_fiber_length=0.1326531 tendon_slack_length=0.04690845
        pennation_angle_at_optimal=0 max_contraction_velocity=10
      PathPoint P1: spine (-0.107432 -0.153833 0.00701453)
      PathPoint P2: thorax (-0.129885 -0.113378 0.036673)
      PathPoint P3: thorax (-0.161074 -0.0841684 0.0600271)
      PathPoint P4: scapula (-0.0848165 -0.00641987 -0.0631206)
    Thelen2003Muscle trap_scap_9: max_isometric_force=123 optimal_fiber_length=0.1476095 tendon_slack_length=0.03344504
        pennation_angle_at_optimal=0 max_contraction_velocity=10
      PathPoint P1: spine (-0.10544 -0.173157 0.00677978)
      PathPoint P2: thorax (-0.125299 -0.115999 0.0406217)
      PathPoint P3: thorax (-0.158462 -0.0985609 0.0647876)
      PathPoint P4: scapula (-0.0904011 -0.0117479 -0.0906014)
    Thelen2003Muscle trap_scap10: max_isometric_force=81 optimal_fiber_length=0.1838025 tendon_slack_length=0.03469156
        pennation_angle_at_optimal=0 max_contraction_velocity=10
      PathPoint P1: spine (-0.0968967 -0.210425 0.00812759)
      PathPoint P2: thorax (-0.121018 -0.163116 0.0280007)
      PathPoint P3: thorax (-0.128418 -0.130526 0.0460367)
      PathPoint P4: thorax (-0.154601 -0.106111 0.0630287)
      PathPoint P5: scapula (-0.0935756 -0.010485 -0.0848622)
    Thelen2003Muscle trap_scap11: max_isometric_force=92 optimal_fiber_length=0.2034238 tendon_slack_length=0.03080633
        pennation_angle_at_optimal=0 max_contraction_velocity=10
      PathPoint P1: spine (-0.0861799 -0.236013 0.00352625)
      PathPoint P2: thorax (-0.124039 -0.190938 0.0279209)
      PathPoint P3: thorax (-0.133133 -0.137513 0.0560376)
      PathPoint P4: thorax (-0.154242 -0.119855 0.0682183)
      PathPoint P5: scapula (-0.0917355 -0.0102018 -0.0751199)
    Thelen2003Muscle trap_clav_1: max_isometric_force=97 optimal_fiber_length=0.1137448 tendon_slack_length=0.04455005
        pennation_angle_at_optimal=0 max_contraction_velocity=10
      PathPoint P1: clavicle (-0.0271558 0.0269012 0.11106)
      PathPoint P2: spine (-0.0437766 0.120683 0.0186103)
    Thelen2003Muscle trap_clav_2: max_isometric_force=47 optimal_fiber_length=0.1467994 tendon_slack_length=0.03902263
        pennation_angle_at_optimal=0 max_contraction_velocity=10
      PathPoint P1: spine (-0.0548157 0.0787086 0.00523815)
      PathPoint P2: clavicle (-0.0223476 0.0251474 0.126814)
    Thelen2003Muscle lev_scap_1: max_isometric_force=96 optimal_fiber_length=0.1473184 tendon_slack_length=0.01773796
        pennation_angle_at_optimal=0 max_contraction_velocity=10
      PathPoint P1: spine (-0.0360739 0.0992369 0.0233369)
      PathPoint P2: thorax (-0.0975352 0.0336808 0.0430407)
      PathPoint P2: scapula (-0.0896872 -0.00734865 -0.110141)
    Thelen2003Muscle lev_scap_2: max_isometric_force=104 optimal_fiber_length=0.1198542 tendon_slack_length=0.01656971
        pennation_angle_at_optimal=0 max_contraction_velocity=10
      PathPoint P1: spine (-0.0412035 0.0852124 0.024265)
      PathPoint P2: thorax (-0.0988487 0.0291313 0.0424816)
      PathPoint P2: scapula (-0.0850846 -0.00382299 -0.111189)
    ObjectGroup glenohumeral_ligament
    ObjectGroup shoulder: members=(CORB DELT1 DELT2 DELT3 INFSP LAT1 LAT2 LAT3 PECM1 PECM2 PECM3 SUBSC SUPSP TMAJ TMIN)
    ObjectGroup elbow: members=(BIClong BICshort TRIlong)
    ObjectGroup trap_scap: members=(trap_scap10 trap_scap11 trap_scap_1 trap_scap_2 trap_scap_3 trap_scap_4 trap_scap_5 trap_scap_6 trap_scap_7 trap_scap_8 trap_scap_9)
    ObjectGroup trap_clav: members=(trap_clav_1 trap_clav_2)
    ObjectGroup lev_scap: members=(lev_scap_1 lev_scap_2)
    ObjectGroup serr_ant
  MarkerSet:
    Marker STER: thorax (0.029458 -0.0236956 -0.00117522)
    Marker XIPH: thorax (0.0864934 -0.169952 0.00264644)
    Marker T10: thorax (-0.134282 -0.188298 -0.000759655)
    Marker C7: thorax (-0.105506 0.0513691 -0.000128674)
    Marker CLAV_SC: clavicle (0.0158397 0.00917544 0.00866544)
    Marker CLAV_post: clavicle (0.00292583 0.00862339 0.0682204)
    Marker CLAV_AC: clavicle (-0.0189527 0.0315064 0.119785)
    Marker SCAP_IA: scapula (-0.131943 -0.130753 -0.0881354)
    Marker SCAP_RS: scapula (-0.1049 -0.0096004 -0.103532)
    Marker SCAP_SA: scapula (-0.0731894 0.0210889 -0.0894899)
    Marker ACRO_tip: scapula (-0.0235222 0.0119421 0.00857422)
    Marker EPICl: humerus (-0.00240456 -0.308306 0.0312526)
    Marker EPICm: humerus (-0.00424695 -0.308125 -0.0579509)
    Marker STYLr: radius (0.0601224 -0.243211 0.0307071)
    Marker STYLu: ulna (-0.0147894 -0.251196 0.033142)
    Marker MEDH: hand_r (-0.0154137 -0.0350808 0.0111453)
    Marker INDEX: hand_r (0.0189224 -0.0778131 0.023632)
    Marker LATH: hand_r (0.00833888 -0.0343415 0.0171933)
    Marker LASTC: hand_r (-0.0243663 -0.0768699 0.00692464)
    Marker infGlen: scapula (-0.0397681 -0.0622797 -0.0140018)
    Marker antGlen: scapula (-0.0232263 -0.0512534 -0.02489)
    Marker postGlen: scapula (-0.0480557 -0.0387195 -0.0101196)
