# OpenSim document version 30000
ScaleTool Stanford VA Upper Limb Model-scaled-scaled:
  mass: 73 [kg]
  height: -1
  age: -1
  ModelScaler:
    apply: true
    time_range: -1 -1
    preserve_mass_distribution: false
  MarkerPlacer:
    apply: true
    marker_file: AnatoAlexandra.trc
    time_range: 0.00333333 3.86667
    max_marker_movement: -1
    IKTaskSet:
      IKMarkerTask STER: apply=true weight=1
      IKMarkerTask XIPH: apply=true weight=1
      IKMarkerTask T10: apply=true weight=1
      IKMarkerTask C6: apply=true weight=1
      IKMarkerTask CLAV_SC: apply=true weight=1
      IKMarkerTask CLAV_post: apply=true weight=1
      IKMarkerTask CLAV_AC: apply=true weight=1
      IKMarkerTask SCAP_IA: apply=true weight=1
      IKMarkerTask SCAP_RS: apply=true weight=1
      IKMarkerTask SCAP_SA: apply=true weight=1
      IKMarkerTask ACRO_tip: apply=true weight=1
      IKMarkerTask EPICl: apply=true weight=1
      IKMarkerTask EPICm: apply=true weight=1
      IKMarkerTask STYLr: apply=true weight=1
      IKMarkerTask STYLu: apply=true weight=1
      IKMarkerTask MEDH: apply=true weight=1
      IKMarkerTask INDEX: apply=true weight=1
      IKMarkerTask LATH: apply=true weight=1
      IKMarkerTask LASTC: apply=true weight=1
      IKMarkerTask T8: apply=true weight=1
      IKMarkerTask CLAVm: apply=true weight=1
      IKMarkerTask CLAV_ant: apply=true weight=1
      IKMarkerTask CLAVl: apply=true weight=1
      IKMarkerTask SCAP_CP: apply=true weight=1
      IKMarkerTask STERr: apply=true weight=1
      IKMarkerTask STERl: apply=true weight=1
      IKMarkerTask DELT: apply=true weight=1
      IKMarkerTask ARMp_up: apply=true weight=1
      IKMarkerTask ARMp_do: apply=true weight=1
      IKMarkerTask LARM_elb: apply=true weight=1
      IKMarkerTask WRIST: apply=true weight=1
      IKMarkerTask STYLr_up: apply=true weight=1
      IKMarkerTask LARM_ant: apply=true weight=1
      IKMarkerTask LARMm: apply=true weight=1
      IKMarkerTask LARMl: apply=true weight=1
      IKMarkerTask ARMl: apply=true weight=1
      IKMarkerTask ARMm: apply=true weight=1
      IKMarkerTask SCAP_AA: apply=true weight=1
      IKMarkerTask SCAPl: apply=true weight=1
      IKMarkerTask SCAPm: apply=true weight=1
      IKMarkerTask pp: apply=true weight=1
