# OpenSim document version 30000
AnalyzeTool TA_scaled_3dof:
  model_file: D:\recherche\yoann\STA_MSK\subject\TA\opensim\TA_scaled_3dof.osim
  replace_force_set: false
  results_directory: D:\recherche\yoann\STA_MSK\subject\TA\opensim\results_PK
  output_precision: 8
  initial_time: 1e-1
  final_time: 1.133333e-1
  solve_for_equilibrium_for_auxiliary_states: false
  maximum_number_of_integrator_steps: 20000
  maximum_integrator_step_size: 1
  minimum_integrator_step_size: 1e-8
  integrator_error_tolerance: 1e-5
  coordinates_file: D:\recherche\yoann\STA_MSK\subject\TA\opensim\Res_IK_stat.mot
  lowpass_cutoff_frequency_for_coordinates: -1
  AnalysisSet Analyses:
    Kinematics: on=false start_time=1e-1 end_time=1.133333e-1 step_interval=1 in_degrees=true
    PointKinematics: start_time=1e-1 end_time=1.133333e-1 step_interval=1 in_degrees=true body_name=clavicle_r
        relative_to_body_name=ground point_name=sternoClav point=(0 0 0)
